State_init := 0
stdev(Value) = 0.650792  # disabled  # stdev:=sqrt((SSQ/n) - ((SQS/n)^2))
SQS := sum(Value) = 22.355  # disabled
table  # each column defines a variable
    Value
    0.499
    0.888
    1.128
    1.482
    1.368
    1.792
    1.990
    2.325
    0.266
    0.525
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end table
Seq := [
    State_init, 0, 0, 0, 0, 0, 0;
    1, .5, .5, 0, 0, 0, 0;
    3, .2, .3, .2, .2, .1, 0;
    24, .41, .162, .12, 0.127, 0.145, 0.036
]
p7(s) := 1 - sum(s[:, j], j = 1 .. 6)
SSQ := sum(Value^2) = 29.17  # disabled
n := length(Value) = 32  # disabled
State := augment(Seq, p7(Seq)) = [
    0, 0, 0, 0, 0, 0, 0, 1;
    1, 0.5, 0.5, 0, 0, 0, 0, 0;
    3, 0.2, 0.3, 0.2, 0.2, 0.1, 0, 0;
    24, 0.41, 0.162, 0.12, 0.127, 0.145, 0.036, 0
]
sqrt(SSQ/n - (SQS/n)^2) = 0.650792  # disabled
Contrib(s, i, v) := (val(s, i, v) - val(s, i - 1, v))*submatrix(s, i, i, 1, cols(s) - 1)  # disabled
Runs(s) := floor(s/8) + if(mod(s, 8) > 3, 1, 0) + if(mod(s, 4) > 1, 1, 0) + mod(s, 2)
Runs(s) := floor(s/16) + if(mod(s, 16) > 7, 1, 0) + if(mod(s, 8) > 3, 1, 0) + if(mod(s, 4) > 1, 1, 0) + mod(s, 2)  # disabled
TransVal(s_0, s_1, v) := v[s_1] - v[s_0] + Runs(s_0) - Runs(s_1) + 1
Contrib(s, i, v) := TransVal(s[i - 1, 0], s[i, 0], Value)*submatrix(s, i, i, 1, cols(s) - 1)
A := Contrib(State, 1, Value) = [0.1945, 0.1945, 0, 0, 0, 0, 0]
Seq2 := [
    0, 0, 0, 0, 0, 0, 0;
    1, .1, .2, .15, .15, .3, .1;
    3, .2, .3, .2, .2, .1, 0;
    0, .5, .5, 0, 0, 0, 0;
    8, .5, .5, 0, 0, 0, 0;
    16, .5, .5, 0, 0, 0, 0;
    24, .41, .162, .12, 0.127, 0.145, 0.036
]
B := Contrib(State, 2, Value) = [0.1188, 0.1782, 0.1188, 0.1188, 0.0594, 0, 0]
C := Contrib(State, 3, Value) = [-0.60762, -0.240084, -0.17784, -0.188214, -0.21489, -0.053352, 0]
sumC := A + B + C = [-0.29432, 0.132616, -0.05904, -0.069414, -0.15549, -0.053352, 0]
sum(sumC) = -0.499
State2 := augment(Seq2, p7(Seq2)) = [
    0, 0, 0, 0, 0, 0, 0, 1;
    1, 0.1, 0.2, 0.15, 0.15, 0.3, 0.1, 0;
    3, 0.2, 0.3, 0.2, 0.2, 0.1, 0, 0;
    0, 0.5, 0.5, 0, 0, 0, 0, 0;
    8, 0.5, 0.5, 0, 0, 0, 0, 0;
    16, 0.5, 0.5, 0, 0, 0, 0, 0;
    24, 0.41, 0.162, 0.12, 0.127, 0.145, 0.036, 0
]
sumC/sum(sumC) = [0.58982, -0.265764, 0.118317, 0.139106, 0.311603, 0.106918, 0]
A2 := Contrib(State2, 1, Value) = [0.0389, 0.0778, 0.05835, 0.05835, 0.1167, 0.0389, 0]
sum(sumC/sum(sumC)) = 1
B2 := Contrib(State2, 2, Value) = [0.1188, 0.1782, 0.1188, 0.1188, 0.0594, 0, 0]
C2 := Contrib(State2, 3, Value) = [1.0085, 1.0085, 0, 0, 0, 0, 0]
D2 := Contrib(State2, 4, Value) = [-0.1165, -0.1165, 0, 0, 0, 0, 0]
E2 := Contrib(State2, 5, Value) = [-0.082, -0.082, 0, 0, 0, 0, 0]
F2 := Contrib(State2, 6, Value) = [-0.04182, -0.016524, -0.01224, -0.012954, -0.01479, -0.003672, 0]
sumC2 := A2 + B2 + C2 + D2 + E2 + F2 = [0.92588, 1.04948, 0.16491, 0.164196, 0.16131, 0.035228, 0]
sum(sumC2) = 2.501
sumC2/sum(sumC2) = [0.370204, 0.419623, 0.0659376, 0.0656521, 0.0644982, 0.0140856, 0]
sum(sumC2/sum(sumC2)) = 1
